<?xml version="1.0"?>

<!--

    Gerard Robin 2009 for Catalina

    modified by HerbyW 2015 for Be-200Altair

-->

<aerodynamics>


  <function name="aero/function/kCDge">
            <description>Change_in_drag_due_to_ground_effect</description>
            <product>
                  <table>
                      <independentVar>aero/h_b-mac-ft</independentVar>
                      <tableData>
                          0.0000	0.4950
                          0.1000	0.5770
                          0.1500	0.6490
                          0.2000	0.7140
                          0.3000	0.7710
                          0.4000	0.8300
                          0.5000	0.8960
                          0.6000	0.9390
                          0.7000	0.9740
                          0.8000	0.9810
                          0.9000	0.9900
                          1.0000	0.9950
                          1.1000	1.0000
                      </tableData>
                  </table>
		  <value>1.0</value><!-- nichts, neu -->
            </product>
        </function>

        <function name="aero/function/kCLge">
            <description>Change_in_lift_due_to_ground_effect</description>
            <product>
                  <table>
                      <independentVar>aero/h_b-mac-ft</independentVar>
                      <tableData>
                          0.0000	1.2410
                          0.1000	1.1750
                          0.1500	1.1270
                          0.2000	1.0950
                          0.3000	1.0750
                          0.4000	1.0520
                          0.5000	1.0350
                          0.6000	1.0240
                          0.7000	1.0150
                          0.8000	1.0110
                          0.9000	1.0060
                          1.0000	1.0030
                          1.1000	1.0000
                      </tableData>
                  </table>
		  <value>0.95</value><!-- nichts, neu -->
            </product>
        </function>

  <function name="hydro/function/kRHump">
    <description>Pressure_Coefficient_On_Hump_Rear</description>
    <product>
      <sum>
	<property>gear/unit[5]/compression-ft</property>
	<property>gear/unit[6]/compression-ft</property>
      </sum>
      <value>1</value><!-- 350 35-->
    </product>
  </function>

  <function name="hydro/function/kCHump">
    <description>Pressure_Coefficient_On_Hump_Center</description>
    <product>
      <sum>
	<property>gear/unit[10]/compression-ft</property>
	<property>gear/unit[11]/compression-ft</property>
      </sum>
      <value>35</value><!-- 350 -->
    </product>
  </function>

  <function name="hydro/function/CfHWTurb">
    <description>Coeff_friction_in_water</description>
    <quotient>
      <value>0.092</value><!-- 0.072 -->
      <pow>
	<property>hydro/function/ReW</property>
	<value>0.2</value><!-- 0.2 20-->
      </pow>
    </quotient>
  </function>

  <axis name="DRAG">

    <function name="aero/coefficient/CDhumpC">
      <description>Drag_at_hump_center</description>
      <product>
	<property>systems/function/wqbar-psf</property>
	<property>hydro/function/CfHWTurb</property>
	<property>hydro/function/kCHump</property>
	<value>0.01</value><!-- 1 0.01-->
      </product>
    </function>

    <function name="aero/coefficient/CDhumpR">
      <description>Drag_at_hump_rear</description>
      <product>
	<property>systems/function/wqbar-psf</property>
	<property>hydro/function/CfHWTurb</property>
	<property>hydro/function/kRHump</property>
	<value>0.01</value><!-- 1 -->
      </product>
    </function>

    <function name="aero/coefficient/CDhumpN">
      <description>Drag_at_hump_nose</description>
      <product>
	<property>systems/function/wqbar-psf</property>
	<property>gear/unit[3]/compression-ft</property>
	<value>0.01</value><!-- 100 1-->
      </product>
    </function>

    <function name="aero/coefficient/CDFloatL">
      <description>Drag_due_to_L-float_not_retracted_inair</description>
      <product>
	<property>aero/qbar-psf</property>
	<property>metrics/Sw-sqft</property>
	<property>systems/float-left</property>
	<value>0.0025</value><!-- 0.0025 -->
      </product>
    </function>

    <function name="aero/coefficient/CDFloatR">
      <description>Drag_due_to_R-float_not_retracted_inair</description>
      <product>
	<property>aero/qbar-psf</property>
	<property>metrics/Sw-sqft</property>
	<property>systems/float-right</property>
	<value>0.0025</value><!-- 0.0025 -->
      </product>
    </function>

    <function name="aero/coefficient/CD0">
                <description>Drag_at_zero_lift</description>
                <product>
                    <property>aero/qbar-psf</property>
                    <property>metrics/Sw-sqft</property>
                    <property>aero/function/kCDge</property>
                      <table>
                          <independentVar>aero/alpha-rad</independentVar>
                          <tableData>
                              -1.5700	1.5000
                              -0.2600	0.0400
                              0.0000	0.01922
                              0.2600	0.0400
                              1.5700	1.5000
                          </tableData>
                      </table>
		      <value>1.0</value><!-- nichts, neu -->
                </product>
            </function>

    <function name="aero/coefficient/CDi">
                <description>Induced_drag</description>
                <product>
                    <property>aero/qbar-psf</property>
                    <property>metrics/Sw-sqft</property>
                    <property>aero/cl-squared</property>
                    <property>aero/function/kCDge</property>
                    <value>0.00717</value><!-- 0.00717 -->
                </product>
            </function>

            <function name="aero/coefficient/CDflap">
                <description>Drag_due_to_flaps</description>
                <product>
                    <property>aero/qbar-psf</property>
                    <property>metrics/Sw-sqft</property>
                    <property>fcs/flap-pos-norm</property>
                    <property>aero/function/kCDge</property>
                    <value>0.095</value><!-- 0.0830 -->
                </product>
            </function>

            <function name="aero/coefficient/CDmach">
                <description>Drag_due_to_mach</description>
                <product>
                    <property>aero/qbar-psf</property>
                    <property>metrics/Sw-sqft</property>
                      <table>
                          <independentVar>velocities/mach</independentVar>
                          <tableData>
                              0.0000	0.0000
                              0.6500	0.0000
                              0.7700	0.0015
                              0.8600	0.0200
                              1.1000	0.0390
                              1.8000	0.0260
                          </tableData>
                      </table>
                </product>
            </function>

    <function name="aero/coefficient/CDgear">
      <description>Drag_due_to_gear</description>
      <product>
	<property>aero/qbar-psf</property>
	<property>metrics/Sw-sqft</property>
	<property>systems/gear/gear-pos-norm</property>
	<value>0.0120</value><!-- 0.0120 -->
      </product>
    </function>

    <function name="aero/coefficient/CDgear_water">
      <description>Drag_due_to_gear_in_water</description>
      <product>
	<property>fcs/drag-gear-in-water-switch</property>
	<table>
	  <independentVar>velocities/vc-kts</independentVar>
	  <tableData>
	    0     0
	    20    1000
	    60    3000
	    100   9000
	    140   27000
	    180   51000
	    220   153000
	  </tableData>
	</table>
      </product>
    </function>


    <!--estimated FIXME we must make difference fuse in air  (which include the hull) and fuse above water  (which does not include hull)-->
    <function name="aero/coefficient/CDfuse">
      <description>_drag_due_to fuse_inair</description>
      <product>
	<property>aero/qbar-psf</property>
	<property>metrics/Sw-sqft</property>
	<property>aero/cl-squared</property>
	<value>0.0490</value><!-- 0.0390 -->
      </product>
    </function>

    <function name="aero/coefficient/CDbeta">
                <description>Drag_due_to_sideslip</description>
                <product>
                    <property>aero/qbar-psf</property>
                    <property>metrics/Sw-sqft</property>
		    <value>1.0</value><!-- neu nichts -->
                      <table>
                          <independentVar>aero/beta-rad</independentVar>
                          <tableData>
                              -1.5700	1.2300
                              -0.2600	0.0500
                              0.0000	0.0000
                              0.2600	0.0500
                              1.5700	1.2300
                          </tableData>
                      </table>
                </product>
            </function>

    <function name="aero/coefficient/CDde">

      <description>Drag_due_to_Elevator_Deflection</description>
      <product>
	<property>aero/qbar-psf</property>
	<property>metrics/Sw-sqft</property>
	<abs><property>fcs/elevator-pos-norm</property></abs>
	<value>0.0590</value><!-- 0.0590 -->
      </product>
    </function>
  </axis>

  <function name="aero/coefficient/CDrv">
                <description>Drag_due_to_reverse</description>
                <product>
                    <property>aero/qbar-psf</property>
                    <property>metrics/Sw-sqft</property>
                    <property>propulsion/engine[0]/reverser-angle-rad</property>
                    <property>propulsion/engine[1]/reverser-angle-rad</property>
                    <value>0.0187</value><!-- 0.0187 -->
                </product>
            </function>

  <axis name="SIDE">
    <function name="aero/coefficient/CYb">
      <description>Side_force_due_to_beta</description>
      <product>
	<property>aero/qbar-psf</property>
	<property>metrics/Sw-sqft</property>
	<property>aero/beta-rad</property>
	<value>-1</value><!-- -1 -->
      </product>
    </function>
  </axis>

  <axis name="LIFT">

    <function name="aero/coefficient/CLalpha">
                <description>Lift_due_to_alpha</description>
                <product>
                    <property>aero/qbar-psf</property>
                    <property>metrics/Sw-sqft</property>
                    <property>aero/function/kCLge</property>

                     <table>
			<independentVar lookup="row">aero/alpha-rad</independentVar>
			<independentVar lookup="column">velocities/mach</independentVar>
			<tableData>
	0.30	0.40	0.50	0.90
-0.79	-2.69	-2.66	-2.61	-2.54
-0.70	-2.75	-2.72	-2.68	-2.61
-0.61	-2.64	-2.62	-2.59	-2.52
-0.52	-2.45	-2.43	-2.39	-2.33
-0.44	-2.15	-2.14	-2.12	-2.07
-0.35	-1.74	-1.74	-1.74	-1.69
-0.26	-1.31	-1.31	-1.31	-1.27
-0.18	-0.84	-0.85	-0.85	-0.83
-0.09	-0.40	-0.40	-0.40	-0.39
0.00	0.00	0.00	0.00	0.00
0.09	0.39	0.39	0.39	0.38
0.18	0.89	0.90	0.90	0.88
0.26	1.48	1.48	1.48	1.44
0.35	2.11	2.11	2.11	2.05
0.44	2.76	2.75	2.73	2.66
0.52	3.33	3.31	3.28	3.19
0.61	3.68	3.62	3.53	3.44
0.70	3.33	3.34	3.34	3.25
0.79	3.17	3.22	3.28	3.19
			</tableData>
                      </table>
		    <value>1.0</value><!-- nichts, neu -->
                </product>
            </function>

    <function name="aero/coefficient/dCLflap">
      <description>Delta_Lift_due_to_flaps</description>
      <product>
	<property>aero/qbar-psf</property>
	<property>metrics/Sw-sqft</property>
	<property>aero/function/kCLge</property>
	<table>
	  <independentVar>fcs/flap-pos-norm</independentVar>
	  <tableData>
	    0.0	      0.0
	    0.16666   0.17
	    0.33333   0.33
	    0.5	      0.5
	    0.66666   0.66
	    0.83333   1.0
	    1.0	      1.2
	  </tableData>
	</table>
	<value>0.5</value><!-- nichts, neu -->
      </product>
    </function>

    <function name="aero/coefficient/CLde">
      <description>Lift_due_to_Elevator_Deflection</description>
      <product>
	<property>aero/qbar-psf</property>
	<property>metrics/Sw-sqft</property>
	<property>fcs/elevator-pos-rad</property>
	<value>-0.2000</value><!-- -0.2000 , 0.3-->
      </product>
    </function>
  </axis>

  <axis name="ROLL">
    <function name="aero/coefficient/Clb">
      <description>Roll_moment_due_to_beta</description>
      <product>
	<property>aero/qbar-psf</property>
	<property>metrics/Sw-sqft</property>
	<property>metrics/bw-ft</property>
	<property>aero/beta-rad</property>
	<value>-0.1000</value><!-- -0.10 -->
      </product>
    </function>

    <function name="aero/coefficient/Clp">
      <description>Roll_moment_due_to_roll_rate</description>
      <product>
	<property>aero/qbar-psf</property>
	<property>metrics/Sw-sqft</property>
	<property>metrics/bw-ft</property>
	<property>aero/bi2vel</property>
	<property>velocities/p-aero-rad_sec</property>
	<value>-0.4000</value><!-- -0.4 -->
      </product>
    </function>

    <function name="aero/coefficient/Clr">
      <description>Roll_moment_due_to_yaw_rate</description>
      <product>
	<property>aero/qbar-psf</property>
	<property>metrics/Sw-sqft</property>
	<property>metrics/bw-ft</property>
	<property>aero/bi2vel</property>
	<property>velocities/r-aero-rad_sec</property>
	<value>0.1500</value><!-- 0.150 -->
      </product>
    </function>

    <function name="aero/coefficient/Clda">
      <description>Roll_moment_due_to_aileron</description>
      <product>
	<property>aero/qbar-psf</property>
	<property>metrics/Sw-sqft</property>
	<property>metrics/bw-ft</property>
	<property>fcs/left-aileron-pos-rad</property>
	<table>
	  <independentVar>velocities/mach</independentVar>
	  <tableData>
	    0.0000    0.1000
	    2.0000    0.0330
	  </tableData>
	</table>
      </product>
    </function>

    <function name="aero/coefficient/Cldr">
      <description>Roll_moment_due_to_rudder</description>
      <product>
	<property>aero/qbar-psf</property>
	<property>metrics/Sw-sqft</property>
	<property>metrics/bw-ft</property>
	<property>fcs/rudder-pos-rad</property>
	<value>0.0100</value><!-- -0.010 -->
      </product>
    </function>
  </axis>

  <axis name="PITCH">


    <function name="aero/coefficient/CmHumpR">
      <description>Pitch_at_hump_Rear</description>
      <product>
	<property>systems/function/wqbar-psf</property>
	<property>hydro/function/CfHWTurb</property>
	<property>hydro/function/kRHump</property>
	<value>1000</value><!-- -1 neu: -1000-->
      </product>
    </function>

    <function name="aero/coefficient/CmHumpC">
      <description>Pitch_at_hump_Center</description>
      <product>
	<property>systems/function/wqbar-psf</property>
	<property>hydro/function/CfHWTurb</property>
	<property>hydro/function/kCHump</property>
	<value>1</value><!-- 1 1000-->
      </product>
    </function>

    <function name="aero/coefficient/CmHumpAV">
      <description>Pitch_at_hump_nose</description>
      <product>
	<property>gear/unit[3]/WOW</property>
	<property>inertia/weight-lbs</property>
	<value>-0.001</value><!-- nichts neu: -0.001 -->
	<table>
	  <independentVar>velocities/vc-kts</independentVar>
	  <tableData>
	    0     0
	    30    0
	    50    -10
	    70   -70
	    90   -170
	    110  -270
	  </tableData>
	</table>
      </product>
    </function>

    <function name="aero/coefficient/Cmo">
                <description>Pitching_moment_at_zero_alpha</description>
                <product>
                    <property>aero/qbar-psf</property>
                    <property>metrics/Sw-sqft</property>
                    <property>metrics/cbarw-ft</property>
		    <property>aero/function/kCLge</property><!--kCmge -->
                    <value>-0.000737</value><!-- -0.000737 -->
                </product>
            </function>

    <function name="aero/coefficient/Cmalpha">
                <description>Pitch_moment_due_to_alpha</description>
                <product>
                    <property>aero/qbar-psf</property>
                    <property>metrics/Sw-sqft</property>
                    <property>metrics/cbarw-ft</property>
                    <property>aero/alpha-rad</property>
                    <value>-0.6000</value><!-- -0.600 -->
                </product>
            </function>

    <function name="aero/coefficient/Cmde">
                <description>Pitch_moment_due_to_elevator</description>
                <product>
                    <property>aero/qbar-psf</property>
                    <property>metrics/Sw-sqft</property>
                    <property>metrics/cbarw-ft</property>
                    <property>fcs/elevator-pos-rad</property>
                      <table>
                          <independentVar>velocities/mach</independentVar>
                          <tableData>
                              0.0000	-1.2000
                              2.0000	-0.3000
                          </tableData>
                      </table>
                </product>
            </function>

    <function name="aero/coefficient/Cmq">
                <description>Pitch_moment_due_to_pitch_rate</description>
                <product>
                    <property>aero/qbar-psf</property>
                    <property>metrics/Sw-sqft</property>
                    <property>metrics/cbarw-ft</property>
                    <property>aero/ci2vel</property>
                    <property>velocities/q-aero-rad_sec</property>
                    <value>-31.0000</value><!-- -31.0000 -->
                </product>
            </function>
            <function name="aero/coefficient/Cmadot">
                <description>Pitch_moment_due_to_alpha_rate</description>
                <product>
                    <property>aero/qbar-psf</property>
                    <property>metrics/Sw-sqft</property>
                    <property>metrics/cbarw-ft</property>
                    <property>aero/ci2vel</property>
                    <property>aero/alphadot-rad_sec</property>
                    <value>-16.0000</value><!-- -16.0000 -->
                </product>
            </function>

    <function name="aero/coefficient/Cmgear_water">
      <description>Pitch_due_to_gear_in_water</description>
      <product>
	<property>fcs/drag-gear-in-water-switch</property>
	<property>inertia/weight-lbs</property>
	<value>1</value><!--  nichts-neu -->
	<table>
	  <independentVar>velocities/vc-kts</independentVar>
	  <tableData>
	    0       0
	    60      0
	    100   -10
	    140   -30
	    180   -90
	    220  -270
	  </tableData>
	</table>
      </product>
    </function>

  </axis>


   <axis name="YAW">
            <function name="aero/coefficient/Cnb">
                <description>Yaw_moment_due_to_beta</description>
                <product>
                    <property>aero/qbar-psf</property>
                    <property>metrics/Sw-sqft</property>
                    <property>metrics/bw-ft</property>
                    <property>aero/beta-rad</property>
                    <value>0.1200</value><!--  0.1200 -->
                </product>
            </function>

            <function name="aero/coefficient/Cnr">
                <description>Yaw_moment_due_to_yaw_rate</description>
                <product>
                    <property>aero/qbar-psf</property>
                    <property>metrics/Sw-sqft</property>
                    <property>metrics/bw-ft</property>
                    <property>aero/bi2vel</property>
                    <property>velocities/r-aero-rad_sec</property>
                    <value>-0.1500</value><!--  -0.1500 -->
                </product>
            </function>

            <function name="aero/coefficient/Cndr">
                <description>Yaw_moment_due_to_rudder</description>
                <product>
                    <property>aero/qbar-psf</property>
                    <property>metrics/Sw-sqft</property>
                    <property>metrics/bw-ft</property>
                    <property>fcs/rudder-pos-rad</property>
                    <value>-0.1000</value><!--  -0.100 -->
                </product>
            </function>

            <function name="aero/coefficient/Cnda">
                <description>Adverse_yaw</description>
                <product>
                    <property>aero/qbar-psf</property>
                    <property>metrics/Sw-sqft</property>
                    <property>metrics/bw-ft</property>
                    <property>fcs/left-aileron-pos-rad</property>
                    <value>0.0000</value><!--  0.0000 -->
                </product>
            </function>

        </axis>

</aerodynamics>
